/BATCH
/TITLE, ECTC BEOL SRAM tier transient thermal - LINK33 1D column
/PREP7
ET,1,LINK33            ! 3-D conduction bar
R,1,1.000000000e-08     ! cross-sectional area [m2]
MP,KXX,1,5
MP,DENS,1,1.0            ! DENS*C folded into C so rho*c = 2e+06
MP,C,1,2000000
MP,KXX,2,110
MP,DENS,2,1.0            ! DENS*C folded into C so rho*c = 1.631e+06
MP,C,2,1631000
MP,KXX,3,2.5
MP,DENS,3,1.0            ! DENS*C folded into C so rho*c = 2.07e+06
MP,C,3,2070000
MP,KXX,4,1.6
MP,DENS,4,1.0            ! DENS*C folded into C so rho*c = 2.074e+06
MP,C,4,2074000
N,1,0,0,0.000000000e+00
N,2,0,0,6.250000000e-07
N,3,0,0,1.250000000e-06
N,4,0,0,1.875000000e-06
N,5,0,0,2.500000000e-06
N,6,0,0,3.125000000e-06
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N,277,0,0,5.597000000e-04
TYPE,1 $ REAL,1
MAT,1 $ E,1,2
MAT,1 $ E,2,3
MAT,1 $ E,3,4
MAT,1 $ E,4,5
MAT,1 $ E,5,6
MAT,1 $ E,6,7
MAT,1 $ E,7,8
MAT,1 $ E,8,9
MAT,1 $ E,9,10
MAT,1 $ E,10,11
MAT,1 $ E,11,12
MAT,1 $ E,12,13
MAT,1 $ E,13,14
MAT,1 $ E,14,15
MAT,1 $ E,15,16
MAT,1 $ E,16,17
MAT,1 $ E,17,18
MAT,1 $ E,18,19
MAT,1 $ E,19,20
MAT,1 $ E,20,21
MAT,1 $ E,21,22
MAT,1 $ E,22,23
MAT,1 $ E,23,24
MAT,1 $ E,24,25
MAT,1 $ E,25,26
MAT,1 $ E,26,27
MAT,1 $ E,27,28
MAT,1 $ E,28,29
MAT,1 $ E,29,30
MAT,1 $ E,30,31
MAT,1 $ E,31,32
MAT,1 $ E,32,33
MAT,1 $ E,33,34
MAT,1 $ E,34,35
MAT,1 $ E,35,36
MAT,1 $ E,36,37
MAT,1 $ E,37,38
MAT,1 $ E,38,39
MAT,1 $ E,39,40
MAT,1 $ E,40,41
MAT,1 $ E,41,42
MAT,1 $ E,42,43
MAT,1 $ E,43,44
MAT,1 $ E,44,45
MAT,1 $ E,45,46
MAT,1 $ E,46,47
MAT,1 $ E,47,48
MAT,1 $ E,48,49
MAT,1 $ E,49,50
MAT,1 $ E,50,51
MAT,1 $ E,51,52
MAT,1 $ E,52,53
MAT,1 $ E,53,54
MAT,1 $ E,54,55
MAT,1 $ E,55,56
MAT,1 $ E,56,57
MAT,1 $ E,57,58
MAT,1 $ E,58,59
MAT,1 $ E,59,60
MAT,1 $ E,60,61
MAT,1 $ E,61,62
MAT,1 $ E,62,63
MAT,1 $ E,63,64
MAT,1 $ E,64,65
MAT,1 $ E,65,66
MAT,1 $ E,66,67
MAT,1 $ E,67,68
MAT,1 $ E,68,69
MAT,1 $ E,69,70
MAT,1 $ E,70,71
MAT,1 $ E,71,72
MAT,1 $ E,72,73
MAT,1 $ E,73,74
MAT,1 $ E,74,75
MAT,1 $ E,75,76
MAT,1 $ E,76,77
MAT,1 $ E,77,78
MAT,1 $ E,78,79
MAT,1 $ E,79,80
MAT,1 $ E,80,81
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MAT,3 $ E,276,277
! 276 elements, 277 nodes, total thickness 559.70 um
FINISH
/SOLU
ANTYPE,TRANS $ TRNOPT,FULL
TUNIF,0 $ OUTRES,ALL,ALL $ KBC,1
D,1,TEMP,0             ! sink face; node n+1 is the board side, left adiabatic
! tier elements 261,262,269,270
! logic elements 161,162,163,164,165,166,167,168,169,170,171,172,173,174,175,176,177,178,179,180
BFE,161,HGEN,,0.000000000e+00
BFE,162,HGEN,,0.000000000e+00
BFE,163,HGEN,,0.000000000e+00
BFE,164,HGEN,,0.000000000e+00
BFE,165,HGEN,,0.000000000e+00
BFE,166,HGEN,,0.000000000e+00
BFE,167,HGEN,,0.000000000e+00
BFE,168,HGEN,,0.000000000e+00
BFE,169,HGEN,,0.000000000e+00
BFE,170,HGEN,,0.000000000e+00
BFE,171,HGEN,,0.000000000e+00
BFE,172,HGEN,,0.000000000e+00
BFE,173,HGEN,,0.000000000e+00
BFE,174,HGEN,,0.000000000e+00
BFE,175,HGEN,,0.000000000e+00
BFE,176,HGEN,,0.000000000e+00
BFE,177,HGEN,,0.000000000e+00
BFE,178,HGEN,,0.000000000e+00
BFE,179,HGEN,,0.000000000e+00
BFE,180,HGEN,,0.000000000e+00
! 12 periods of 4.5150 ms; burst 216.7 us, gap 4298.3 us
BFE,261,HGEN,,4.750000000e+11
BFE,262,HGEN,,4.750000000e+11
BFE,269,HGEN,,4.750000000e+11
BFE,270,HGEN,,4.750000000e+11
TIME,2.167200000e-04 $ NSUBST,10 $ SOLVE
BFE,261,HGEN,,0
BFE,262,HGEN,,0
BFE,269,HGEN,,0
BFE,270,HGEN,,0
TIME,4.515000000e-03 $ NSUBST,20 $ SOLVE
BFE,261,HGEN,,4.750000000e+11
BFE,262,HGEN,,4.750000000e+11
BFE,269,HGEN,,4.750000000e+11
BFE,270,HGEN,,4.750000000e+11
TIME,4.731720000e-03 $ NSUBST,10 $ SOLVE
BFE,261,HGEN,,0
BFE,262,HGEN,,0
BFE,269,HGEN,,0
BFE,270,HGEN,,0
TIME,9.030000000e-03 $ NSUBST,20 $ SOLVE
BFE,261,HGEN,,4.750000000e+11
BFE,262,HGEN,,4.750000000e+11
BFE,269,HGEN,,4.750000000e+11
BFE,270,HGEN,,4.750000000e+11
TIME,9.246720000e-03 $ NSUBST,10 $ SOLVE
BFE,261,HGEN,,0
BFE,262,HGEN,,0
BFE,269,HGEN,,0
BFE,270,HGEN,,0
TIME,1.354500000e-02 $ NSUBST,20 $ SOLVE
BFE,261,HGEN,,4.750000000e+11
BFE,262,HGEN,,4.750000000e+11
BFE,269,HGEN,,4.750000000e+11
BFE,270,HGEN,,4.750000000e+11
TIME,1.376172000e-02 $ NSUBST,10 $ SOLVE
BFE,261,HGEN,,0
BFE,262,HGEN,,0
BFE,269,HGEN,,0
BFE,270,HGEN,,0
TIME,1.806000000e-02 $ NSUBST,20 $ SOLVE
BFE,261,HGEN,,4.750000000e+11
BFE,262,HGEN,,4.750000000e+11
BFE,269,HGEN,,4.750000000e+11
BFE,270,HGEN,,4.750000000e+11
TIME,1.827672000e-02 $ NSUBST,10 $ SOLVE
BFE,261,HGEN,,0
BFE,262,HGEN,,0
BFE,269,HGEN,,0
BFE,270,HGEN,,0
TIME,2.257500000e-02 $ NSUBST,20 $ SOLVE
BFE,261,HGEN,,4.750000000e+11
BFE,262,HGEN,,4.750000000e+11
BFE,269,HGEN,,4.750000000e+11
BFE,270,HGEN,,4.750000000e+11
TIME,2.279172000e-02 $ NSUBST,10 $ SOLVE
BFE,261,HGEN,,0
BFE,262,HGEN,,0
BFE,269,HGEN,,0
BFE,270,HGEN,,0
TIME,2.709000000e-02 $ NSUBST,20 $ SOLVE
BFE,261,HGEN,,4.750000000e+11
BFE,262,HGEN,,4.750000000e+11
BFE,269,HGEN,,4.750000000e+11
BFE,270,HGEN,,4.750000000e+11
TIME,2.730672000e-02 $ NSUBST,10 $ SOLVE
BFE,261,HGEN,,0
BFE,262,HGEN,,0
BFE,269,HGEN,,0
BFE,270,HGEN,,0
TIME,3.160500000e-02 $ NSUBST,20 $ SOLVE
BFE,261,HGEN,,4.750000000e+11
BFE,262,HGEN,,4.750000000e+11
BFE,269,HGEN,,4.750000000e+11
BFE,270,HGEN,,4.750000000e+11
TIME,3.182172000e-02 $ NSUBST,10 $ SOLVE
BFE,261,HGEN,,0
BFE,262,HGEN,,0
BFE,269,HGEN,,0
BFE,270,HGEN,,0
TIME,3.612000000e-02 $ NSUBST,20 $ SOLVE
BFE,261,HGEN,,4.750000000e+11
BFE,262,HGEN,,4.750000000e+11
BFE,269,HGEN,,4.750000000e+11
BFE,270,HGEN,,4.750000000e+11
TIME,3.633672000e-02 $ NSUBST,10 $ SOLVE
BFE,261,HGEN,,0
BFE,262,HGEN,,0
BFE,269,HGEN,,0
BFE,270,HGEN,,0
TIME,4.063500000e-02 $ NSUBST,20 $ SOLVE
BFE,261,HGEN,,4.750000000e+11
BFE,262,HGEN,,4.750000000e+11
BFE,269,HGEN,,4.750000000e+11
BFE,270,HGEN,,4.750000000e+11
TIME,4.085172000e-02 $ NSUBST,10 $ SOLVE
BFE,261,HGEN,,0
BFE,262,HGEN,,0
BFE,269,HGEN,,0
BFE,270,HGEN,,0
TIME,4.515000000e-02 $ NSUBST,20 $ SOLVE
BFE,261,HGEN,,4.750000000e+11
BFE,262,HGEN,,4.750000000e+11
BFE,269,HGEN,,4.750000000e+11
BFE,270,HGEN,,4.750000000e+11
TIME,4.536672000e-02 $ NSUBST,10 $ SOLVE
BFE,261,HGEN,,0
BFE,262,HGEN,,0
BFE,269,HGEN,,0
BFE,270,HGEN,,0
TIME,4.966500000e-02 $ NSUBST,20 $ SOLVE
BFE,261,HGEN,,4.750000000e+11
BFE,262,HGEN,,4.750000000e+11
BFE,269,HGEN,,4.750000000e+11
BFE,270,HGEN,,4.750000000e+11
TIME,4.988172000e-02 $ NSUBST,10 $ SOLVE
BFE,261,HGEN,,0
BFE,262,HGEN,,0
BFE,269,HGEN,,0
BFE,270,HGEN,,0
TIME,5.418000000e-02 $ NSUBST,20 $ SOLVE
FINISH
/POST26
NUMVAR,10
NSOL,2,270,TEMP,,TIER     ! deepest tier node
NSOL,3,161,TEMP,,LOGIC
/OUT,hist,txt
PRVAR,2,3
/OUT
*GET,TMAXT,VARI,2,EXTREM,VMAX
*GET,TMINT,VARI,2,EXTREM,VMIN
*GET,TMAXL,VARI,3,EXTREM,VMAX
/OUT,summary,txt
*VWRITE,TMAXT,TMINT,TMAXL
('RESULT tier_max=',E14.7,' tier_min=',E14.7,' logic_max=',E14.7)
/OUT
FINISH
