/BATCH
/TITLE, C2 macro 153x518 um, prod, phi=0.900, BEOL kxy/kz=1
/PREP7
ET,1,SOLID70
MP,KXX,1,5
MP,KYY,1,5
MP,KZZ,1,5
MP,DENS,1,1.0
MP,C,1,2000000
MP,KXX,2,110
MP,KYY,2,110
MP,KZZ,2,110
MP,DENS,2,1.0
MP,C,2,1631000
MP,KXX,3,1.4
MP,KYY,3,1.4
MP,KZZ,3,1.4
MP,DENS,3,1.0
MP,C,3,1606000
MP,KXX,4,2.5
MP,KYY,4,2.5
MP,KZZ,4,2.5
MP,DENS,4,1.0
MP,C,4,2070000
N,1,0.000000000e+00,0.000000000e+00,0.000000000e+00
N,2,0.000000000e+00,0.000000000e+00,1.666666667e-05
N,3,0.000000000e+00,0.000000000e+00,3.333333333e-05
N,4,0.000000000e+00,0.000000000e+00,5.000000000e-05
N,5,0.000000000e+00,0.000000000e+00,2.069005596e-04
N,6,0.000000000e+00,0.000000000e+00,3.324210073e-04
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N,50388,1.530000000e-04,5.180000000e-04,8.320500000e-04
TYPE,1
MAT,1
E,1,53,1041,989,2,54,1042,990
E,53,105,1093,1041,54,106,1094,1042
E,105,157,1145,1093,106,158,1146,1094
E,157,209,1197,1145,158,210,1198,1146
E,209,261,1249,1197,210,262,1250,1198
E,261,313,1301,1249,262,314,1302,1250
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E,49297,49349,50337,50285,49298,49350,50338,50286
MAT,1
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E,49298,49350,50338,50286,49299,49351,50339,50287
MAT,1
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E,49299,49351,50339,50287,49300,49352,50340,50288
MAT,2
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E,49300,49352,50340,50288,49301,49353,50341,50289
MAT,2
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E,49301,49353,50341,50289,49302,49354,50342,50290
MAT,2
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! 45900 elements, 50388 nodes
ESEL,NONE
ESEL,A,CENT,Z,8.230500000e-04,8.240500000e-04
CM,TIER,ELEM
ESEL,R,CENT,X,0,1.330000000e-04
ESEL,R,CENT,Y,0,4.260000000e-04
CM,TIER_ARR,ELEM
CMSEL,S,TIER
CMSEL,U,TIER_ARR
CM,TIER_PER,ELEM
ESEL,NONE
ESEL,A,CENT,Z,8.076250000e-04,8.086250000e-04
CM,LOGIC,ELEM
NSEL,S,LOC,Z,-1e-12,8.333333333e-06
CM,SINK,NODE
ALLSEL,ALL
FINISH
/SOLU
ANTYPE,TRANS
TRNOPT,FULL
KBC,1
AUTOTS,OFF
OUTRES,ERASE
OUTRES,NSOL,LAST
TUNIF,40
CMSEL,S,SINK
SF,ALL,CONV,8.368398955e+03,40
ALLSEL,ALL
CMSEL,S,TIER_ARR $ BFE,ALL,HGEN,,3.189295775e+08
CMSEL,S,TIER_PER $ BFE,ALL,HGEN,,7.197256506e+09
CMSEL,S,LOGIC $ BFE,ALL,HGEN,,4.366875000e+11
ALLSEL,ALL
TIMINT,OFF
TIME,1e-6
NSUBST,1
SOLVE
TIMINT,ON
PER=4.515000000e-03
DON=2.167200000e-04
T0=1e-6
*DO,IP,1,6
CMSEL,S,TIER_ARR $ BFE,ALL,HGEN,,6.644366197e+09
CMSEL,S,TIER_PER $ BFE,ALL,HGEN,,1.499428439e+11
CMSEL,S,LOGIC $ BFE,ALL,HGEN,,4.366875000e+11
ALLSEL,ALL
TB_=T0+(IP-1)*PER+DON
TIME,TB_
NSUBST,16
SOLVE
CMSEL,S,TIER_ARR $ BFE,ALL,HGEN,,0.000000000e+00
CMSEL,S,TIER_PER $ BFE,ALL,HGEN,,0.000000000e+00
CMSEL,S,LOGIC $ BFE,ALL,HGEN,,4.366875000e+11
ALLSEL,ALL
TE_=T0+IP*PER
TIME,TE_
NSUBST,30
SOLVE
*ENDDO
FINISH
/POST1
SET,12,LAST
CMSEL,S,TIER $ NSLE,S $ NSORT,TEMP
*GET,TPK,SORT,0,MAX
ALLSEL,ALL
SET,12,LAST
CMSEL,S,TIER $ NSLE,S $ NSORT,TEMP
*GET,TPKMIN,SORT,0,MIN
ALLSEL,ALL
SET,12,LAST
CMSEL,S,LOGIC $ NSLE,S $ NSORT,TEMP
*GET,TLG,SORT,0,MAX
ALLSEL,ALL
SET,10,LAST
CMSEL,S,TIER $ NSLE,S $ NSORT,TEMP
*GET,TPKP,SORT,0,MAX
ALLSEL,ALL
SET,13,LAST
CMSEL,S,TIER $ NSLE,S $ NSORT,TEMP
*GET,TTR,SORT,0,MAX
ALLSEL,ALL
SET,1,LAST
CMSEL,S,TIER $ NSLE,S $ NSORT,TEMP
*GET,TMEAN,SORT,0,MAX
ALLSEL,ALL
/OUT,summary,txt
*VWRITE,TPK,TPKMIN,TLG,TPKP,TTR,TMEAN
('RESULT peak=',E15.8,' peakmin=',E15.8,' logic=',E15.8,' prevpeak=',E15.8,' trough=',E15.8,' mean=',E15.8)
/OUT
FINISH
